// SBML level 3 version 2

model NP_MT_RNM()
  // NP Mechanotransduction Regulatory Network Model
  // A systems-level network model reveals mechanical regulation of nucleus pulposus cell states.
  // Zerihun G. Workineh, Francis Kiptengwer Chemorion, Jérôme Noailly
  // Barcelona Centre for New Medical Technologies (BCN MedTech), Department of Engineering, Universitat Pompeu Fabra, Barcelona, 08018, Spain
  // Abstract
  // Intervertebral disc degeneration (IDD) is a leading cause of chronic low back pain and is strongly influenced by mechanical loading–dependent regulation of nucleus pulposus (NP) cell phenotype. Although individual mechanosensors and signaling pathways have been characterized, the systems-level principles governing how NP cells integrate mechanical cues into coordinated regulatory states remain unclear. Here, we present a systems-level regulatory network model of NP mechanotransduction comprising 147 molecular nodes and 356 experimentally supported interactions spanning mechanosensory inputs, signaling cascades, metabolic and redox regulators, transcription factors, extracellular matrix (ECM) effectors, inflammatory mediators, and cell-fate modules. Mechanical environments are represented as hypo-, normal-, and hyper-loading inputs that initiate distinct signaling programs. Semi-quantitative regulatory network simulations reveal three stable regimes: a hypo-loading state characterized by reduced ECM-anabolic activity, impaired adhesion-mediated survival signaling, and metabolic stress with features consistent with an anoikis-like phenotype; a normal-loading state associated with coordinated ECM maintenance, metabolic balance, and redox stability; and a hyper-loading state dominated by inflammatory amplification, oxidative stress, matrix degradation, and apoptosis. Falsification tests against independent experimental data demonstrate high directional concordance (~95%), supporting the biological plausibility of the network. Systematic perturbation analysis further identifies a distributed control structure in which mechanotransductive, redox, and transcriptional regulators jointly determine state stability, with combined attenuation of mechanically driven and stress-amplifying pathways together with activation of anabolic or cytoprotective programs most effectively restoring normal-like states. These findings provide a systems-level framework for understanding load-dependent NP cell regulation and for guiding multi-target therapeutic strategies in intervertebral disc mechanobiology.
  // Keywords: Nucleus pulposus, Mechanotransduction, Regulatory network modeling, Mechanical loading, Intervertebral disc degeneration, Systems biology, Network control
  // NP Mechanotransduction Regulatory Network Model
  // 147 nodes, 281 activation edges, 76 inhibition edges.
  // Mathematical framework: Mendoza/SQUADS ODE (Mendoza & Xenarios 2006). Each non-stimulus species rate rule: dx/dt = sigmoid(omega; h) - gamma*x. Parameters: h=10.0, gamma=1.0, alpha=beta=1.
  // Boundary (clampable input) species: HL, NL, Hypo.
  // model units - time: time_unit

  // Compartments:
  compartment cell = 1; cell is "NP cell";

  // Species:
  species ACAN in cell = 0.5;  // substance in arbitrary_units
  species ADAMTS4_5 in cell = 0.5; ADAMTS4_5 is "ADAMTS4/5";  // substance in arbitrary_units
  species AKT1_E in cell = 0.5; AKT1_E is "AKT1-E";  // substance in arbitrary_units
  species AKT1_M in cell = 0.5; AKT1_M is "AKT1-M";  // substance in arbitrary_units
  species AMPK in cell = 0.5;  // substance in arbitrary_units
  species ANXA1 in cell = 0.5;  // substance in arbitrary_units
  species AP_1 in cell = 0.5; AP_1 is "AP-1";  // substance in arbitrary_units
  species AQP1 in cell = 0.5;  // substance in arbitrary_units
  species AQP5 in cell = 0.5;  // substance in arbitrary_units
  species BAD in cell = 0.5;  // substance in arbitrary_units
  species BAX in cell = 0.5;  // substance in arbitrary_units
  species Bcl2 in cell = 0.5;  // substance in arbitrary_units
  species BMP2 in cell = 0.5;  // substance in arbitrary_units
  species BNIP3 in cell = 0.5;  // substance in arbitrary_units
  species Ca2plusos in cell = 0.5; Ca2plusos is "Ca2+os";  // substance in arbitrary_units
  species Ca2plussu in cell = 0.5; Ca2plussu is "Ca2+su";  // substance in arbitrary_units
  species CaMKII in cell = 0.5;  // substance in arbitrary_units
  species CaN in cell = 0.5;  // substance in arbitrary_units
  species CASP3 in cell = 0.5;  // substance in arbitrary_units
  species CASP9 in cell = 0.5;  // substance in arbitrary_units
  species CAT in cell = 0.5;  // substance in arbitrary_units
  species CCL2 in cell = 0.5;  // substance in arbitrary_units
  species CCN2 in cell = 0.5;  // substance in arbitrary_units
  species CDC42 in cell = 0.5;  // substance in arbitrary_units
  species CITED2 in cell = 0.5;  // substance in arbitrary_units
  species COL10A1 in cell = 0.5;  // substance in arbitrary_units
  species COL1A1 in cell = 0.5;  // substance in arbitrary_units
  species COL2A1 in cell = 0.5;  // substance in arbitrary_units
  species COX_2 in cell = 0.5; COX_2 is "COX-2";  // substance in arbitrary_units
  species CREB in cell = 0.5;  // substance in arbitrary_units
  species CXCL1 in cell = 0.5;  // substance in arbitrary_units
  species CXCL3 in cell = 0.5;  // substance in arbitrary_units
  species DAG in cell = 0.5;  // substance in arbitrary_units
  species DRP1 in cell = 0.5;  // substance in arbitrary_units
  species ELK1 in cell = 0.5;  // substance in arbitrary_units
  species ERK_E in cell = 0.5; ERK_E is "ERK-E";  // substance in arbitrary_units
  species ERK_M in cell = 0.5; ERK_M is "ERK-M";  // substance in arbitrary_units
  species FAK_E in cell = 0.5; FAK_E is "FAK-E";  // substance in arbitrary_units
  species FAK_M in cell = 0.5; FAK_M is "FAK-M";  // substance in arbitrary_units
  species FGF18 in cell = 0.5;  // substance in arbitrary_units
  species FGF2 in cell = 0.5;  // substance in arbitrary_units
  species FOXO in cell = 0.5;  // substance in arbitrary_units
  species GADD45 in cell = 0.5;  // substance in arbitrary_units
  species GDF5 in cell = 0.5;  // substance in arbitrary_units
  species GPX1 in cell = 0.5;  // substance in arbitrary_units
  species GSK3B in cell = 0.5;  // substance in arbitrary_units
  species HIF_1alpha in cell = 0.5; HIF_1alpha is "HIF-1α";  // substance in arbitrary_units
  species HIF_2alpha in cell = 0.5; HIF_2alpha is "HIF-2α";  // substance in arbitrary_units
  species $HL in cell = 0.5;  // substance in arbitrary_units
  species HO_1 in cell = 0.5; HO_1 is "HO-1";  // substance in arbitrary_units
  species HSF1 in cell = 0.5;  // substance in arbitrary_units
  species HSP27 in cell = 0.5;  // substance in arbitrary_units
  species HSP70 in cell = 0.5;  // substance in arbitrary_units
  species IGF1 in cell = 0.5;  // substance in arbitrary_units
  species IKK in cell = 0.5;  // substance in arbitrary_units
  species IL1beta in cell = 0.5; IL1beta is "IL1β";  // substance in arbitrary_units
  species IL6 in cell = 0.5;  // substance in arbitrary_units
  species IL8 in cell = 0.5;  // substance in arbitrary_units
  species iNOS in cell = 0.5;  // substance in arbitrary_units
  species IP3 in cell = 0.5;  // substance in arbitrary_units
  species IkappaBalpha in cell = 0.5; IkappaBalpha is "IκBα";  // substance in arbitrary_units
  species JNK in cell = 0.5;  // substance in arbitrary_units
  species LATS1_2 in cell = 0.5; LATS1_2 is "LATS1/2";  // substance in arbitrary_units
  species LIMK1 in cell = 0.5;  // substance in arbitrary_units
  species MAP3K in cell = 0.5;  // substance in arbitrary_units
  species MEK_E in cell = 0.5; MEK_E is "MEK-E";  // substance in arbitrary_units
  species MEK_M in cell = 0.5; MEK_M is "MEK-M";  // substance in arbitrary_units
  species MKK3_6 in cell = 0.5; MKK3_6 is "MKK3/6";  // substance in arbitrary_units
  species MKK4_7 in cell = 0.5; MKK4_7 is "MKK4/7";  // substance in arbitrary_units
  species MMP1 in cell = 0.5;  // substance in arbitrary_units
  species MMP13 in cell = 0.5;  // substance in arbitrary_units
  species MMP3 in cell = 0.5;  // substance in arbitrary_units
  species MOMP in cell = 0.5;  // substance in arbitrary_units
  species MRTF_A in cell = 0.5; MRTF_A is "MRTF-A";  // substance in arbitrary_units
  species MST1_2 in cell = 0.5; MST1_2 is "MST1/2";  // substance in arbitrary_units
  species mTORC1 in cell = 0.5;  // substance in arbitrary_units
  species mTORC2 in cell = 0.5;  // substance in arbitrary_units
  species NF_kappaB in cell = 0.5; NF_kappaB is "NF-κB";  // substance in arbitrary_units
  species NFAT in cell = 0.5;  // substance in arbitrary_units
  species $NL in cell = 0.5;  // substance in arbitrary_units
  species NRF2 in cell = 0.5;  // substance in arbitrary_units
  species P38 in cell = 0.5;  // substance in arbitrary_units
  species PAK1 in cell = 0.5;  // substance in arbitrary_units
  species PDK1_E in cell = 0.5; PDK1_E is "PDK1-E";  // substance in arbitrary_units
  species PDK1_M in cell = 0.5; PDK1_M is "PDK1-M";  // substance in arbitrary_units
  species PGE2 in cell = 0.5;  // substance in arbitrary_units
  species PHD2 in cell = 0.5;  // substance in arbitrary_units
  species PI3K_E in cell = 0.5; PI3K_E is "PI3K-E";  // substance in arbitrary_units
  species PI3K_M in cell = 0.5; PI3K_M is "PI3K-M";  // substance in arbitrary_units
  species PIEZO1 in cell = 0.5;  // substance in arbitrary_units
  species PIP3_E in cell = 0.5; PIP3_E is "PIP3-E";  // substance in arbitrary_units
  species PIP3_M in cell = 0.5; PIP3_M is "PIP3-M";  // substance in arbitrary_units
  species PKC_M in cell = 0.5; PKC_M is "PKC-M";  // substance in arbitrary_units
  species PKC_E in cell = 0.5; PKC_E is "PKC-E";  // substance in arbitrary_units
  species PKN1 in cell = 0.5;  // substance in arbitrary_units
  species PLA2 in cell = 0.5;  // substance in arbitrary_units
  species PLCgamma_M in cell = 0.5; PLCgamma_M is "PLCγ-M";  // substance in arbitrary_units
  species PLCgamma_E in cell = 0.5; PLCgamma_E is "PLCγ-E";  // substance in arbitrary_units
  species PLD2 in cell = 0.5;  // substance in arbitrary_units
  species PPARgamma in cell = 0.5; PPARgamma is "PPARγ";  // substance in arbitrary_units
  species PTEN in cell = 0.5;  // substance in arbitrary_units
  species RAC1_M in cell = 0.5; RAC1_M is "RAC1-M";  // substance in arbitrary_units
  species RAC1_E in cell = 0.5; RAC1_E is "RAC1-E";  // substance in arbitrary_units
  species RAF_E in cell = 0.5; RAF_E is "RAF-E";  // substance in arbitrary_units
  species RAF_M in cell = 0.5; RAF_M is "RAF-M";  // substance in arbitrary_units
  species RAS_E in cell = 0.5; RAS_E is "RAS-E";  // substance in arbitrary_units
  species RAS_M in cell = 0.5; RAS_M is "RAS-M";  // substance in arbitrary_units
  species Rheb in cell = 0.5;  // substance in arbitrary_units
  species RhoA_E in cell = 0.5; RhoA_E is "RhoA-E";  // substance in arbitrary_units
  species RhoA_M in cell = 0.5; RhoA_M is "RhoA-M";  // substance in arbitrary_units
  species ROCK_E in cell = 0.5; ROCK_E is "ROCK-E";  // substance in arbitrary_units
  species ROCK_M in cell = 0.5; ROCK_M is "ROCK-M";  // substance in arbitrary_units
  species ROS in cell = 0.5;  // substance in arbitrary_units
  species RSK in cell = 0.5;  // substance in arbitrary_units
  species RUNX2 in cell = 0.5;  // substance in arbitrary_units
  species SIRT1 in cell = 0.5;  // substance in arbitrary_units
  species SMIT1 in cell = 0.5;  // substance in arbitrary_units
  species SOD1 in cell = 0.5;  // substance in arbitrary_units
  species SOD2 in cell = 0.5;  // substance in arbitrary_units
  species SOX5 in cell = 0.5;  // substance in arbitrary_units
  species SOX6 in cell = 0.5;  // substance in arbitrary_units
  species SOX9 in cell = 0.5;  // substance in arbitrary_units
  species TAK1 in cell = 0.5;  // substance in arbitrary_units
  species TAUT in cell = 0.5;  // substance in arbitrary_units
  species TGFbeta in cell = 0.5; TGFbeta is "TGFβ";  // substance in arbitrary_units
  species TIMP3 in cell = 0.5;  // substance in arbitrary_units
  species TNF in cell = 0.5;  // substance in arbitrary_units
  species TonEBP in cell = 0.5;  // substance in arbitrary_units
  species TRPV4 in cell = 0.5;  // substance in arbitrary_units
  species ULK1 in cell = 0.5;  // substance in arbitrary_units
  species VEGF in cell = 0.5;  // substance in arbitrary_units
  species VHL in cell = 0.5;  // substance in arbitrary_units
  species Wnt3a in cell = 0.5;  // substance in arbitrary_units
  species Wnt5a in cell = 0.5;  // substance in arbitrary_units
  species YAP_TAZ in cell = 0.5; YAP_TAZ is "YAP/TAZ";  // substance in arbitrary_units
  species alpha5beta1_FN in cell = 0.5; alpha5beta1_FN is "α5β1-FN";  // substance in arbitrary_units
  species alpha5beta1_Fs in cell = 0.5; alpha5beta1_Fs is "α5β1-Fs";  // substance in arbitrary_units
  species alphaVbeta3 in cell = 0.5; alphaVbeta3 is "αVβ3";  // substance in arbitrary_units
  species alphaVbeta6 in cell = 0.5; alphaVbeta6 is "αVβ6";  // substance in arbitrary_units
  species beta_catenin in cell = 0.5; beta_catenin is "β-catenin";  // substance in arbitrary_units
  species NADplus in cell = 0.5; NADplus is "NAD+";  // substance in arbitrary_units
  species LKB1 in cell = 0.5;  // substance in arbitrary_units
  species SDC4_M in cell = 0.5; SDC4_M is "SDC4-M";  // substance in arbitrary_units
  species SDC4_E in cell = 0.5; SDC4_E is "SDC4-E";  // substance in arbitrary_units
  species $Hypo in cell = 0.5;  // substance in arbitrary_units
  species NutD in cell = 0.5;  // substance in arbitrary_units
  species MitD in cell = 0.5;  // substance in arbitrary_units

  // Parameters:
  h = 10; h is "Sigmoid gain";
  gamma = 1; gamma is "Linear decay constant";

  // Rate rules:
  ACAN' = (-exp(0.5*h) + exp(-1*h*((3 + 1)/3*((HIF_1alpha + PPARgamma + SOX9)/(1 + HIF_1alpha + PPARgamma + SOX9)) - 0.5)))/((1 - exp(0.5*h))*(1 + exp(-1*h*((3 + 1)/3*((HIF_1alpha + PPARgamma + SOX9)/(1 + HIF_1alpha + PPARgamma + SOX9)) - 0.5)))) - gamma*ACAN;
  ADAMTS4_5' = (-exp(0.5*h) + exp(-1*h*((4 + 1)/4*((HIF_2alpha + JNK + NF_kappaB + P38)/(1 + HIF_2alpha + JNK + NF_kappaB + P38))*(1 - (1 + 1)/1*(PPARgamma/(1 + PPARgamma))) - 0.5)))/((1 - exp(0.5*h))*(1 + exp(-1*h*((4 + 1)/4*((HIF_2alpha + JNK + NF_kappaB + P38)/(1 + HIF_2alpha + JNK + NF_kappaB + P38))*(1 - (1 + 1)/1*(PPARgamma/(1 + PPARgamma))) - 0.5)))) - gamma*ADAMTS4_5;
  AKT1_E' = (-exp(0.5*h) + exp(-1*h*((2 + 1)/2*((mTORC2 + PDK1_E)/(1 + mTORC2 + PDK1_E))*(1 - (1 + 1)/1*(PIP3_M/(1 + PIP3_M))) - 0.5)))/((1 - exp(0.5*h))*(1 + exp(-1*h*((2 + 1)/2*((mTORC2 + PDK1_E)/(1 + mTORC2 + PDK1_E))*(1 - (1 + 1)/1*(PIP3_M/(1 + PIP3_M))) - 0.5)))) - gamma*AKT1_E;
  AKT1_M' = (-exp(0.5*h) + exp(-1*h*((2 + 1)/2*((mTORC2 + PDK1_M)/(1 + mTORC2 + PDK1_M))*(1 - (1 + 1)/1*(PIP3_E/(1 + PIP3_E))) - 0.5)))/((1 - exp(0.5*h))*(1 + exp(-1*h*((2 + 1)/2*((mTORC2 + PDK1_M)/(1 + mTORC2 + PDK1_M))*(1 - (1 + 1)/1*(PIP3_E/(1 + PIP3_E))) - 0.5)))) - gamma*AKT1_M;
  AMPK' = (-exp(0.5*h) + exp(-1*h*((3 + 1)/3*((Ca2plusos + ROS + LKB1)/(1 + Ca2plusos + ROS + LKB1))*(1 - (1 + 1)/1*(mTORC1/(1 + mTORC1))) - 0.5)))/((1 - exp(0.5*h))*(1 + exp(-1*h*((3 + 1)/3*((Ca2plusos + ROS + LKB1)/(1 + Ca2plusos + ROS + LKB1))*(1 - (1 + 1)/1*(mTORC1/(1 + mTORC1))) - 0.5)))) - gamma*AMPK;
  ANXA1' = (-exp(0.5*h) + exp(-1*h*((1 + 1)/1*(CREB/(1 + CREB)) - 0.5)))/((1 - exp(0.5*h))*(1 + exp(-1*h*((1 + 1)/1*(CREB/(1 + CREB)) - 0.5)))) - gamma*ANXA1;
  AP_1' = (-exp(0.5*h) + exp(-1*h*((3 + 1)/3*((ERK_E + JNK + P38)/(1 + ERK_E + JNK + P38))*(1 - (2 + 1)/2*((PPARgamma + SOX9)/(1 + PPARgamma + SOX9))) - 0.5)))/((1 - exp(0.5*h))*(1 + exp(-1*h*((3 + 1)/3*((ERK_E + JNK + P38)/(1 + ERK_E + JNK + P38))*(1 - (2 + 1)/2*((PPARgamma + SOX9)/(1 + PPARgamma + SOX9))) - 0.5)))) - gamma*AP_1;
  AQP1' = (-exp(0.5*h) + exp(-1*h*((2 + 1)/2*((HIF_1alpha + TonEBP)/(1 + HIF_1alpha + TonEBP))*(1 - (1 + 1)/1*(ROS/(1 + ROS))) - 0.5)))/((1 - exp(0.5*h))*(1 + exp(-1*h*((2 + 1)/2*((HIF_1alpha + TonEBP)/(1 + HIF_1alpha + TonEBP))*(1 - (1 + 1)/1*(ROS/(1 + ROS))) - 0.5)))) - gamma*AQP1;
  AQP5' = (-exp(0.5*h) + exp(-1*h*((2 + 1)/2*((HIF_1alpha + TonEBP)/(1 + HIF_1alpha + TonEBP))*(1 - (1 + 1)/1*(ROS/(1 + ROS))) - 0.5)))/((1 - exp(0.5*h))*(1 + exp(-1*h*((2 + 1)/2*((HIF_1alpha + TonEBP)/(1 + HIF_1alpha + TonEBP))*(1 - (1 + 1)/1*(ROS/(1 + ROS))) - 0.5)))) - gamma*AQP5;
  BAD' = (-exp(0.5*h) + exp(-1*h*((1 + 1)/1*(JNK/(1 + JNK))*(1 - (1 + 1)/1*(AKT1_M/(1 + AKT1_M))) - 0.5)))/((1 - exp(0.5*h))*(1 + exp(-1*h*((1 + 1)/1*(JNK/(1 + JNK))*(1 - (1 + 1)/1*(AKT1_M/(1 + AKT1_M))) - 0.5)))) - gamma*BAD;
  BAX' = (-exp(0.5*h) + exp(-1*h*((1 + 1)/1*(ROS/(1 + ROS))*(1 - (1 + 1)/1*(Bcl2/(1 + Bcl2))) - 0.5)))/((1 - exp(0.5*h))*(1 + exp(-1*h*((1 + 1)/1*(ROS/(1 + ROS))*(1 - (1 + 1)/1*(Bcl2/(1 + Bcl2))) - 0.5)))) - gamma*BAX;
  Bcl2' = (-exp(0.5*h) + exp(-1*h*((4 + 1)/4*((AKT1_E + AKT1_M + CREB + PPARgamma)/(1 + AKT1_E + AKT1_M + CREB + PPARgamma))*(1 - (2 + 1)/2*((BAD + JNK)/(1 + BAD + JNK))) - 0.5)))/((1 - exp(0.5*h))*(1 + exp(-1*h*((4 + 1)/4*((AKT1_E + AKT1_M + CREB + PPARgamma)/(1 + AKT1_E + AKT1_M + CREB + PPARgamma))*(1 - (2 + 1)/2*((BAD + JNK)/(1 + BAD + JNK))) - 0.5)))) - gamma*Bcl2;
  BMP2' = (-exp(0.5*h) + exp(-1*h*((3 + 1)/3*((AP_1 + NF_kappaB + RUNX2)/(1 + AP_1 + NF_kappaB + RUNX2)) - 0.5)))/((1 - exp(0.5*h))*(1 + exp(-1*h*((3 + 1)/3*((AP_1 + NF_kappaB + RUNX2)/(1 + AP_1 + NF_kappaB + RUNX2)) - 0.5)))) - gamma*BMP2;
  BNIP3' = (-exp(0.5*h) + exp(-1*h*((1 + 1)/1*(HIF_1alpha/(1 + HIF_1alpha))*(1 - (1 + 1)/1*(NRF2/(1 + NRF2))) - 0.5)))/((1 - exp(0.5*h))*(1 + exp(-1*h*((1 + 1)/1*(HIF_1alpha/(1 + HIF_1alpha))*(1 - (1 + 1)/1*(NRF2/(1 + NRF2))) - 0.5)))) - gamma*BNIP3;
  Ca2plusos' = (-exp(0.5*h) + exp(-1*h*((1 + 1)/1*(TRPV4/(1 + TRPV4)) - 0.5)))/((1 - exp(0.5*h))*(1 + exp(-1*h*((1 + 1)/1*(TRPV4/(1 + TRPV4)) - 0.5)))) - gamma*Ca2plusos;
  Ca2plussu' = (-exp(0.5*h) + exp(-1*h*((2 + 1)/2*((IP3 + PIEZO1)/(1 + IP3 + PIEZO1)) - 0.5)))/((1 - exp(0.5*h))*(1 + exp(-1*h*((2 + 1)/2*((IP3 + PIEZO1)/(1 + IP3 + PIEZO1)) - 0.5)))) - gamma*Ca2plussu;
  CaMKII' = (-exp(0.5*h) + exp(-1*h*((1 + 1)/1*(Ca2plusos/(1 + Ca2plusos)) - 0.5)))/((1 - exp(0.5*h))*(1 + exp(-1*h*((1 + 1)/1*(Ca2plusos/(1 + Ca2plusos)) - 0.5)))) - gamma*CaMKII;
  CaN' = (-exp(0.5*h) + exp(-1*h*((2 + 1)/2*((Ca2plussu + IP3)/(1 + Ca2plussu + IP3)) - 0.5)))/((1 - exp(0.5*h))*(1 + exp(-1*h*((2 + 1)/2*((Ca2plussu + IP3)/(1 + Ca2plussu + IP3)) - 0.5)))) - gamma*CaN;
  CASP3' = (-exp(0.5*h) + exp(-1*h*((1 + 1)/1*(CASP9/(1 + CASP9)) - 0.5)))/((1 - exp(0.5*h))*(1 + exp(-1*h*((1 + 1)/1*(CASP9/(1 + CASP9)) - 0.5)))) - gamma*CASP3;
  CASP9' = (-exp(0.5*h) + exp(-1*h*((1 + 1)/1*(MOMP/(1 + MOMP))*(1 - (1 + 1)/1*(AKT1_M/(1 + AKT1_M))) - 0.5)))/((1 - exp(0.5*h))*(1 + exp(-1*h*((1 + 1)/1*(MOMP/(1 + MOMP))*(1 - (1 + 1)/1*(AKT1_M/(1 + AKT1_M))) - 0.5)))) - gamma*CASP9;
  CAT' = (-exp(0.5*h) + exp(-1*h*((2 + 1)/2*((FOXO + NRF2)/(1 + FOXO + NRF2)) - 0.5)))/((1 - exp(0.5*h))*(1 + exp(-1*h*((2 + 1)/2*((FOXO + NRF2)/(1 + FOXO + NRF2)) - 0.5)))) - gamma*CAT;
  CCL2' = (-exp(0.5*h) + exp(-1*h*((2 + 1)/2*((AP_1 + NF_kappaB)/(1 + AP_1 + NF_kappaB)) - 0.5)))/((1 - exp(0.5*h))*(1 + exp(-1*h*((2 + 1)/2*((AP_1 + NF_kappaB)/(1 + AP_1 + NF_kappaB)) - 0.5)))) - gamma*CCL2;
  CCN2' = (-exp(0.5*h) + exp(-1*h*((2 + 1)/2*((SOX9 + YAP_TAZ)/(1 + SOX9 + YAP_TAZ))*(1 - (1 + 1)/1*(beta_catenin/(1 + beta_catenin))) - 0.5)))/((1 - exp(0.5*h))*(1 + exp(-1*h*((2 + 1)/2*((SOX9 + YAP_TAZ)/(1 + SOX9 + YAP_TAZ))*(1 - (1 + 1)/1*(beta_catenin/(1 + beta_catenin))) - 0.5)))) - gamma*CCN2;
  CDC42' = (-exp(0.5*h) + exp(-1*h*((1 + 1)/1*(FAK_M/(1 + FAK_M)) - 0.5)))/((1 - exp(0.5*h))*(1 + exp(-1*h*((1 + 1)/1*(FAK_M/(1 + FAK_M)) - 0.5)))) - gamma*CDC42;
  CITED2' = (-exp(0.5*h) + exp(-1*h*((1 + 1)/1*(HIF_1alpha/(1 + HIF_1alpha)) - 0.5)))/((1 - exp(0.5*h))*(1 + exp(-1*h*((1 + 1)/1*(HIF_1alpha/(1 + HIF_1alpha)) - 0.5)))) - gamma*CITED2;
  COL10A1' = (-exp(0.5*h) + exp(-1*h*((2 + 1)/2*((HIF_2alpha + RUNX2)/(1 + HIF_2alpha + RUNX2))*(1 - (1 + 1)/1*(SOX9/(1 + SOX9))) - 0.5)))/((1 - exp(0.5*h))*(1 + exp(-1*h*((2 + 1)/2*((HIF_2alpha + RUNX2)/(1 + HIF_2alpha + RUNX2))*(1 - (1 + 1)/1*(SOX9/(1 + SOX9))) - 0.5)))) - gamma*COL10A1;
  COL1A1' = (-exp(0.5*h) + exp(-1*h*((3 + 1)/3*((AP_1 + MRTF_A + YAP_TAZ)/(1 + AP_1 + MRTF_A + YAP_TAZ))*(1 - (2 + 1)/2*((PPARgamma + SOX9)/(1 + PPARgamma + SOX9))) - 0.5)))/((1 - exp(0.5*h))*(1 + exp(-1*h*((3 + 1)/3*((AP_1 + MRTF_A + YAP_TAZ)/(1 + AP_1 + MRTF_A + YAP_TAZ))*(1 - (2 + 1)/2*((PPARgamma + SOX9)/(1 + PPARgamma + SOX9))) - 0.5)))) - gamma*COL1A1;
  COL2A1' = (-exp(0.5*h) + exp(-1*h*((4 + 1)/4*((HIF_1alpha + PPARgamma + SOX9 + TonEBP)/(1 + HIF_1alpha + PPARgamma + SOX9 + TonEBP)) - 0.5)))/((1 - exp(0.5*h))*(1 + exp(-1*h*((4 + 1)/4*((HIF_1alpha + PPARgamma + SOX9 + TonEBP)/(1 + HIF_1alpha + PPARgamma + SOX9 + TonEBP)) - 0.5)))) - gamma*COL2A1;
  COX_2' = (-exp(0.5*h) + exp(-1*h*((3 + 1)/3*((AP_1 + NF_kappaB + NFAT)/(1 + AP_1 + NF_kappaB + NFAT)) - 0.5)))/((1 - exp(0.5*h))*(1 + exp(-1*h*((3 + 1)/3*((AP_1 + NF_kappaB + NFAT)/(1 + AP_1 + NF_kappaB + NFAT)) - 0.5)))) - gamma*COX_2;
  CREB' = (-exp(0.5*h) + exp(-1*h*((4 + 1)/4*((CaMKII + ERK_E + ERK_M + RSK)/(1 + CaMKII + ERK_E + ERK_M + RSK))*(1 - (1 + 1)/1*(GSK3B/(1 + GSK3B))) - 0.5)))/((1 - exp(0.5*h))*(1 + exp(-1*h*((4 + 1)/4*((CaMKII + ERK_E + ERK_M + RSK)/(1 + CaMKII + ERK_E + ERK_M + RSK))*(1 - (1 + 1)/1*(GSK3B/(1 + GSK3B))) - 0.5)))) - gamma*CREB;
  CXCL1' = (-exp(0.5*h) + exp(-1*h*((2 + 1)/2*((AP_1 + NF_kappaB)/(1 + AP_1 + NF_kappaB)) - 0.5)))/((1 - exp(0.5*h))*(1 + exp(-1*h*((2 + 1)/2*((AP_1 + NF_kappaB)/(1 + AP_1 + NF_kappaB)) - 0.5)))) - gamma*CXCL1;
  CXCL3' = (-exp(0.5*h) + exp(-1*h*((2 + 1)/2*((AP_1 + NF_kappaB)/(1 + AP_1 + NF_kappaB)) - 0.5)))/((1 - exp(0.5*h))*(1 + exp(-1*h*((2 + 1)/2*((AP_1 + NF_kappaB)/(1 + AP_1 + NF_kappaB)) - 0.5)))) - gamma*CXCL3;
  DAG' = (-exp(0.5*h) + exp(-1*h*((1 + 1)/1*(PLCgamma_M/(1 + PLCgamma_M)) - 0.5)))/((1 - exp(0.5*h))*(1 + exp(-1*h*((1 + 1)/1*(PLCgamma_M/(1 + PLCgamma_M)) - 0.5)))) - gamma*DAG;
  DRP1' = (-exp(0.5*h) + exp(-1*h*((2 + 1)/2*((CaN + ROS)/(1 + CaN + ROS)) - 0.5)))/((1 - exp(0.5*h))*(1 + exp(-1*h*((2 + 1)/2*((CaN + ROS)/(1 + CaN + ROS)) - 0.5)))) - gamma*DRP1;
  ELK1' = (-exp(0.5*h) + exp(-1*h*((2 + 1)/2*((ERK_E + MAP3K)/(1 + ERK_E + MAP3K)) - 0.5)))/((1 - exp(0.5*h))*(1 + exp(-1*h*((2 + 1)/2*((ERK_E + MAP3K)/(1 + ERK_E + MAP3K)) - 0.5)))) - gamma*ELK1;
  ERK_E' = (-exp(0.5*h) + exp(-1*h*((1 + 1)/1*(MEK_E/(1 + MEK_E)) - 0.5)))/((1 - exp(0.5*h))*(1 + exp(-1*h*((1 + 1)/1*(MEK_E/(1 + MEK_E)) - 0.5)))) - gamma*ERK_E;
  ERK_M' = (-exp(0.5*h) + exp(-1*h*((1 + 1)/1*(MEK_M/(1 + MEK_M)) - 0.5)))/((1 - exp(0.5*h))*(1 + exp(-1*h*((1 + 1)/1*(MEK_M/(1 + MEK_M)) - 0.5)))) - gamma*ERK_M;
  FAK_E' = (-exp(0.5*h) + exp(-1*h*((3 + 1)/3*((alpha5beta1_Fs + alphaVbeta3 + SDC4_E)/(1 + alpha5beta1_Fs + alphaVbeta3 + SDC4_E)) - 0.5)))/((1 - exp(0.5*h))*(1 + exp(-1*h*((3 + 1)/3*((alpha5beta1_Fs + alphaVbeta3 + SDC4_E)/(1 + alpha5beta1_Fs + alphaVbeta3 + SDC4_E)) - 0.5)))) - gamma*FAK_E;
  FAK_M' = (-exp(0.5*h) + exp(-1*h*((3 + 1)/3*((alpha5beta1_FN + alphaVbeta6 + SDC4_M)/(1 + alpha5beta1_FN + alphaVbeta6 + SDC4_M)) - 0.5)))/((1 - exp(0.5*h))*(1 + exp(-1*h*((3 + 1)/3*((alpha5beta1_FN + alphaVbeta6 + SDC4_M)/(1 + alpha5beta1_FN + alphaVbeta6 + SDC4_M)) - 0.5)))) - gamma*FAK_M;
  FGF18' = (-exp(0.5*h) + exp(-1*h*((3 + 1)/3*((RUNX2 + SOX9 + beta_catenin)/(1 + RUNX2 + SOX9 + beta_catenin))*(1 - (1 + 1)/1*(NF_kappaB/(1 + NF_kappaB))) - 0.5)))/((1 - exp(0.5*h))*(1 + exp(-1*h*((3 + 1)/3*((RUNX2 + SOX9 + beta_catenin)/(1 + RUNX2 + SOX9 + beta_catenin))*(1 - (1 + 1)/1*(NF_kappaB/(1 + NF_kappaB))) - 0.5)))) - gamma*FGF18;
  FGF2' = (-exp(0.5*h) + exp(-1*h*((3 + 1)/3*((AP_1 + HIF_1alpha + NF_kappaB)/(1 + AP_1 + HIF_1alpha + NF_kappaB))*(1 - (1 + 1)/1*(PPARgamma/(1 + PPARgamma))) - 0.5)))/((1 - exp(0.5*h))*(1 + exp(-1*h*((3 + 1)/3*((AP_1 + HIF_1alpha + NF_kappaB)/(1 + AP_1 + HIF_1alpha + NF_kappaB))*(1 - (1 + 1)/1*(PPARgamma/(1 + PPARgamma))) - 0.5)))) - gamma*FGF2;
  FOXO' = (-exp(0.5*h) + exp(-1*h*((4 + 1)/4*((AMPK + JNK + MST1_2 + P38)/(1 + AMPK + JNK + MST1_2 + P38))*(1 - (2 + 1)/2*((AKT1_E + ERK_E)/(1 + AKT1_E + ERK_E))) - 0.5)))/((1 - exp(0.5*h))*(1 + exp(-1*h*((4 + 1)/4*((AMPK + JNK + MST1_2 + P38)/(1 + AMPK + JNK + MST1_2 + P38))*(1 - (2 + 1)/2*((AKT1_E + ERK_E)/(1 + AKT1_E + ERK_E))) - 0.5)))) - gamma*FOXO;
  GADD45' = (-exp(0.5*h) + exp(-1*h*((2 + 1)/2*((FOXO + NF_kappaB)/(1 + FOXO + NF_kappaB)) - 0.5)))/((1 - exp(0.5*h))*(1 + exp(-1*h*((2 + 1)/2*((FOXO + NF_kappaB)/(1 + FOXO + NF_kappaB)) - 0.5)))) - gamma*GADD45;
  GDF5' = (-exp(0.5*h) + exp(-1*h*((3 + 1)/3*((SOX5 + SOX6 + beta_catenin)/(1 + SOX5 + SOX6 + beta_catenin))*(1 - (1 + 1)/1*(NF_kappaB/(1 + NF_kappaB))) - 0.5)))/((1 - exp(0.5*h))*(1 + exp(-1*h*((3 + 1)/3*((SOX5 + SOX6 + beta_catenin)/(1 + SOX5 + SOX6 + beta_catenin))*(1 - (1 + 1)/1*(NF_kappaB/(1 + NF_kappaB))) - 0.5)))) - gamma*GDF5;
  GPX1' = (-exp(0.5*h) + exp(-1*h*((2 + 1)/2*((FOXO + NRF2)/(1 + FOXO + NRF2)) - 0.5)))/((1 - exp(0.5*h))*(1 + exp(-1*h*((2 + 1)/2*((FOXO + NRF2)/(1 + FOXO + NRF2)) - 0.5)))) - gamma*GPX1;
  GSK3B' = (-exp(0.5*h) + exp(-1*h*((1 + 1)/1*(ROS/(1 + ROS))*(1 - (1 + 1)/1*(AKT1_M/(1 + AKT1_M))) - 0.5)))/((1 - exp(0.5*h))*(1 + exp(-1*h*((1 + 1)/1*(ROS/(1 + ROS))*(1 - (1 + 1)/1*(AKT1_M/(1 + AKT1_M))) - 0.5)))) - gamma*GSK3B;
  HIF_1alpha' = (-exp(0.5*h) + exp(-1*h*((5 + 1)/5*((ERK_M + JNK + mTORC1 + P38 + NutD)/(1 + ERK_M + JNK + mTORC1 + P38 + NutD))*(1 - (1 + 1)/1*(GSK3B/(1 + GSK3B))) - 0.5)))/((1 - exp(0.5*h))*(1 + exp(-1*h*((5 + 1)/5*((ERK_M + JNK + mTORC1 + P38 + NutD)/(1 + ERK_M + JNK + mTORC1 + P38 + NutD))*(1 - (1 + 1)/1*(GSK3B/(1 + GSK3B))) - 0.5)))) - gamma*HIF_1alpha;
  HIF_2alpha' = (-exp(0.5*h) + exp(-1*h*((2 + 1)/2*((NF_kappaB + ROS)/(1 + NF_kappaB + ROS))*(1 - (1 + 1)/1*(VHL/(1 + VHL))) - 0.5)))/((1 - exp(0.5*h))*(1 + exp(-1*h*((2 + 1)/2*((NF_kappaB + ROS)/(1 + NF_kappaB + ROS))*(1 - (1 + 1)/1*(VHL/(1 + VHL))) - 0.5)))) - gamma*HIF_2alpha;
  HO_1' = (-exp(0.5*h) + exp(-1*h*((2 + 1)/2*((HIF_1alpha + NRF2)/(1 + HIF_1alpha + NRF2)) - 0.5)))/((1 - exp(0.5*h))*(1 + exp(-1*h*((2 + 1)/2*((HIF_1alpha + NRF2)/(1 + HIF_1alpha + NRF2)) - 0.5)))) - gamma*HO_1;
  HSF1' = (-exp(0.5*h) + exp(-1*h*((2 + 1)/2*((mTORC1 + SIRT1)/(1 + mTORC1 + SIRT1))*(1 - (2 + 1)/2*((AMPK + JNK)/(1 + AMPK + JNK))) - 0.5)))/((1 - exp(0.5*h))*(1 + exp(-1*h*((2 + 1)/2*((mTORC1 + SIRT1)/(1 + mTORC1 + SIRT1))*(1 - (2 + 1)/2*((AMPK + JNK)/(1 + AMPK + JNK))) - 0.5)))) - gamma*HSF1;
  HSP27' = (-exp(0.5*h) + exp(-1*h*((1 + 1)/1*(HSF1/(1 + HSF1)) - 0.5)))/((1 - exp(0.5*h))*(1 + exp(-1*h*((1 + 1)/1*(HSF1/(1 + HSF1)) - 0.5)))) - gamma*HSP27;
  HSP70' = (-exp(0.5*h) + exp(-1*h*((2 + 1)/2*((HSF1 + TonEBP)/(1 + HSF1 + TonEBP)) - 0.5)))/((1 - exp(0.5*h))*(1 + exp(-1*h*((2 + 1)/2*((HSF1 + TonEBP)/(1 + HSF1 + TonEBP)) - 0.5)))) - gamma*HSP70;
  IGF1' = (-exp(0.5*h) + exp(-1*h*((1 + 1)/1*(SOX9/(1 + SOX9)) - 0.5)))/((1 - exp(0.5*h))*(1 + exp(-1*h*((1 + 1)/1*(SOX9/(1 + SOX9)) - 0.5)))) - gamma*IGF1;
  IKK' = (-exp(0.5*h) + exp(-1*h*((2 + 1)/2*((TAK1 + Hypo)/(1 + TAK1 + Hypo)) - 0.5)))/((1 - exp(0.5*h))*(1 + exp(-1*h*((2 + 1)/2*((TAK1 + Hypo)/(1 + TAK1 + Hypo)) - 0.5)))) - gamma*IKK;
  IL1beta' = (-exp(0.5*h) + exp(-1*h*((3 + 1)/3*((AP_1 + NF_kappaB + YAP_TAZ)/(1 + AP_1 + NF_kappaB + YAP_TAZ))*(1 - (1 + 1)/1*(PPARgamma/(1 + PPARgamma))) - 0.5)))/((1 - exp(0.5*h))*(1 + exp(-1*h*((3 + 1)/3*((AP_1 + NF_kappaB + YAP_TAZ)/(1 + AP_1 + NF_kappaB + YAP_TAZ))*(1 - (1 + 1)/1*(PPARgamma/(1 + PPARgamma))) - 0.5)))) - gamma*IL1beta;
  IL6' = (-exp(0.5*h) + exp(-1*h*((3 + 1)/3*((AP_1 + NF_kappaB + YAP_TAZ)/(1 + AP_1 + NF_kappaB + YAP_TAZ))*(1 - (1 + 1)/1*(PPARgamma/(1 + PPARgamma))) - 0.5)))/((1 - exp(0.5*h))*(1 + exp(-1*h*((3 + 1)/3*((AP_1 + NF_kappaB + YAP_TAZ)/(1 + AP_1 + NF_kappaB + YAP_TAZ))*(1 - (1 + 1)/1*(PPARgamma/(1 + PPARgamma))) - 0.5)))) - gamma*IL6;
  IL8' = (-exp(0.5*h) + exp(-1*h*((2 + 1)/2*((AP_1 + NF_kappaB)/(1 + AP_1 + NF_kappaB)) - 0.5)))/((1 - exp(0.5*h))*(1 + exp(-1*h*((2 + 1)/2*((AP_1 + NF_kappaB)/(1 + AP_1 + NF_kappaB)) - 0.5)))) - gamma*IL8;
  iNOS' = (-exp(0.5*h) + exp(-1*h*((2 + 1)/2*((AP_1 + NF_kappaB)/(1 + AP_1 + NF_kappaB))*(1 - (1 + 1)/1*(NRF2/(1 + NRF2))) - 0.5)))/((1 - exp(0.5*h))*(1 + exp(-1*h*((2 + 1)/2*((AP_1 + NF_kappaB)/(1 + AP_1 + NF_kappaB))*(1 - (1 + 1)/1*(NRF2/(1 + NRF2))) - 0.5)))) - gamma*iNOS;
  IP3' = (-exp(0.5*h) + exp(-1*h*((2 + 1)/2*((PLCgamma_E + ROS)/(1 + PLCgamma_E + ROS))*(1 - (1 + 1)/1*(CaMKII/(1 + CaMKII))) - 0.5)))/((1 - exp(0.5*h))*(1 + exp(-1*h*((2 + 1)/2*((PLCgamma_E + ROS)/(1 + PLCgamma_E + ROS))*(1 - (1 + 1)/1*(CaMKII/(1 + CaMKII))) - 0.5)))) - gamma*IP3;
  IkappaBalpha' = (-exp(0.5*h) + exp(-1*h*((1 + 1)/1*(AKT1_M/(1 + AKT1_M))*(1 - (1 + 1)/1*(IKK/(1 + IKK))) - 0.5)))/((1 - exp(0.5*h))*(1 + exp(-1*h*((1 + 1)/1*(AKT1_M/(1 + AKT1_M))*(1 - (1 + 1)/1*(IKK/(1 + IKK))) - 0.5)))) - gamma*IkappaBalpha;
  JNK' = (-exp(0.5*h) + exp(-1*h*((3 + 1)/3*((FAK_E + MKK4_7 + ROS)/(1 + FAK_E + MKK4_7 + ROS)) - 0.5)))/((1 - exp(0.5*h))*(1 + exp(-1*h*((3 + 1)/3*((FAK_E + MKK4_7 + ROS)/(1 + FAK_E + MKK4_7 + ROS)) - 0.5)))) - gamma*JNK;
  LATS1_2' = (-exp(0.5*h) + exp(-1*h*((1 + 1)/1*(MST1_2/(1 + MST1_2))*(1 - (2 + 1)/2*((ROCK_E + ROCK_M)/(1 + ROCK_E + ROCK_M))) - 0.5)))/((1 - exp(0.5*h))*(1 + exp(-1*h*((1 + 1)/1*(MST1_2/(1 + MST1_2))*(1 - (2 + 1)/2*((ROCK_E + ROCK_M)/(1 + ROCK_E + ROCK_M))) - 0.5)))) - gamma*LATS1_2;
  LIMK1' = (-exp(0.5*h) + exp(-1*h*((3 + 1)/3*((PKN1 + ROCK_E + ROCK_M)/(1 + PKN1 + ROCK_E + ROCK_M))*(1 - (1 + 1)/1*(AMPK/(1 + AMPK))) - 0.5)))/((1 - exp(0.5*h))*(1 + exp(-1*h*((3 + 1)/3*((PKN1 + ROCK_E + ROCK_M)/(1 + PKN1 + ROCK_E + ROCK_M))*(1 - (1 + 1)/1*(AMPK/(1 + AMPK))) - 0.5)))) - gamma*LIMK1;
  MAP3K' = (-exp(0.5*h) + exp(-1*h*((2 + 1)/2*((Ca2plussu + ROS)/(1 + Ca2plussu + ROS)) - 0.5)))/((1 - exp(0.5*h))*(1 + exp(-1*h*((2 + 1)/2*((Ca2plussu + ROS)/(1 + Ca2plussu + ROS)) - 0.5)))) - gamma*MAP3K;
  MEK_E' = (-exp(0.5*h) + exp(-1*h*((1 + 1)/1*(RAF_E/(1 + RAF_E)) - 0.5)))/((1 - exp(0.5*h))*(1 + exp(-1*h*((1 + 1)/1*(RAF_E/(1 + RAF_E)) - 0.5)))) - gamma*MEK_E;
  MEK_M' = (-exp(0.5*h) + exp(-1*h*((1 + 1)/1*(RAF_M/(1 + RAF_M)) - 0.5)))/((1 - exp(0.5*h))*(1 + exp(-1*h*((1 + 1)/1*(RAF_M/(1 + RAF_M)) - 0.5)))) - gamma*MEK_M;
  MKK3_6' = (-exp(0.5*h) + exp(-1*h*((1 + 1)/1*(MAP3K/(1 + MAP3K)) - 0.5)))/((1 - exp(0.5*h))*(1 + exp(-1*h*((1 + 1)/1*(MAP3K/(1 + MAP3K)) - 0.5)))) - gamma*MKK3_6;
  MKK4_7' = (-exp(0.5*h) + exp(-1*h*((1 + 1)/1*(MAP3K/(1 + MAP3K)) - 0.5)))/((1 - exp(0.5*h))*(1 + exp(-1*h*((1 + 1)/1*(MAP3K/(1 + MAP3K)) - 0.5)))) - gamma*MKK4_7;
  MMP1' = (-exp(0.5*h) + exp(-1*h*((3 + 1)/3*((AP_1 + NF_kappaB + YAP_TAZ)/(1 + AP_1 + NF_kappaB + YAP_TAZ))*(1 - (1 + 1)/1*(SOX9/(1 + SOX9))) - 0.5)))/((1 - exp(0.5*h))*(1 + exp(-1*h*((3 + 1)/3*((AP_1 + NF_kappaB + YAP_TAZ)/(1 + AP_1 + NF_kappaB + YAP_TAZ))*(1 - (1 + 1)/1*(SOX9/(1 + SOX9))) - 0.5)))) - gamma*MMP1;
  MMP13' = (-exp(0.5*h) + exp(-1*h*((7 + 1)/7*((AP_1 + HIF_2alpha + MRTF_A + NF_kappaB + NFAT + RUNX2 + YAP_TAZ)/(1 + AP_1 + HIF_2alpha + MRTF_A + NF_kappaB + NFAT + RUNX2 + YAP_TAZ))*(1 - (1 + 1)/1*(SOX9/(1 + SOX9))) - 0.5)))/((1 - exp(0.5*h))*(1 + exp(-1*h*((7 + 1)/7*((AP_1 + HIF_2alpha + MRTF_A + NF_kappaB + NFAT + RUNX2 + YAP_TAZ)/(1 + AP_1 + HIF_2alpha + MRTF_A + NF_kappaB + NFAT + RUNX2 + YAP_TAZ))*(1 - (1 + 1)/1*(SOX9/(1 + SOX9))) - 0.5)))) - gamma*MMP13;
  MMP3' = (-exp(0.5*h) + exp(-1*h*((3 + 1)/3*((AP_1 + NF_kappaB + YAP_TAZ)/(1 + AP_1 + NF_kappaB + YAP_TAZ))*(1 - (1 + 1)/1*(SOX9/(1 + SOX9))) - 0.5)))/((1 - exp(0.5*h))*(1 + exp(-1*h*((3 + 1)/3*((AP_1 + NF_kappaB + YAP_TAZ)/(1 + AP_1 + NF_kappaB + YAP_TAZ))*(1 - (1 + 1)/1*(SOX9/(1 + SOX9))) - 0.5)))) - gamma*MMP3;
  MOMP' = (-exp(0.5*h) + exp(-1*h*((1 + 1)/1*(BAX/(1 + BAX))*(1 - (1 + 1)/1*(Bcl2/(1 + Bcl2))) - 0.5)))/((1 - exp(0.5*h))*(1 + exp(-1*h*((1 + 1)/1*(BAX/(1 + BAX))*(1 - (1 + 1)/1*(Bcl2/(1 + Bcl2))) - 0.5)))) - gamma*MOMP;
  MRTF_A' = (-exp(0.5*h) + exp(-1*h*((2 + 1)/2*((LIMK1 + ROCK_E)/(1 + LIMK1 + ROCK_E)) - 0.5)))/((1 - exp(0.5*h))*(1 + exp(-1*h*((2 + 1)/2*((LIMK1 + ROCK_E)/(1 + LIMK1 + ROCK_E)) - 0.5)))) - gamma*MRTF_A;
  MST1_2' = (-exp(0.5*h) + exp(-1*h*((1 + 1)/1*(ROCK_M/(1 + ROCK_M)) - 0.5)))/((1 - exp(0.5*h))*(1 + exp(-1*h*((1 + 1)/1*(ROCK_M/(1 + ROCK_M)) - 0.5)))) - gamma*MST1_2;
  mTORC1' = (-exp(0.5*h) + exp(-1*h*((4 + 1)/4*((ERK_E + ERK_M + PLD2 + Rheb)/(1 + ERK_E + ERK_M + PLD2 + Rheb))*(1 - (1 + 1)/1*(AMPK/(1 + AMPK))) - 0.5)))/((1 - exp(0.5*h))*(1 + exp(-1*h*((4 + 1)/4*((ERK_E + ERK_M + PLD2 + Rheb)/(1 + ERK_E + ERK_M + PLD2 + Rheb))*(1 - (1 + 1)/1*(AMPK/(1 + AMPK))) - 0.5)))) - gamma*mTORC1;
  mTORC2' = (-exp(0.5*h) + exp(-1*h*((2 + 1)/2*((FAK_M + PIP3_M)/(1 + FAK_M + PIP3_M))*(1 - (1 + 1)/1*(mTORC1/(1 + mTORC1))) - 0.5)))/((1 - exp(0.5*h))*(1 + exp(-1*h*((2 + 1)/2*((FAK_M + PIP3_M)/(1 + FAK_M + PIP3_M))*(1 - (1 + 1)/1*(mTORC1/(1 + mTORC1))) - 0.5)))) - gamma*mTORC2;
  NF_kappaB' = (-exp(0.5*h) + exp(-1*h*((2 + 1)/2*((JNK + ROS)/(1 + JNK + ROS))*(1 - (1 + 1)/1*(IkappaBalpha/(1 + IkappaBalpha))) - 0.5)))/((1 - exp(0.5*h))*(1 + exp(-1*h*((2 + 1)/2*((JNK + ROS)/(1 + JNK + ROS))*(1 - (1 + 1)/1*(IkappaBalpha/(1 + IkappaBalpha))) - 0.5)))) - gamma*NF_kappaB;
  NFAT' = (-exp(0.5*h) + exp(-1*h*((1 + 1)/1*(CaN/(1 + CaN)) - 0.5)))/((1 - exp(0.5*h))*(1 + exp(-1*h*((1 + 1)/1*(CaN/(1 + CaN)) - 0.5)))) - gamma*NFAT;
  NRF2' = (-exp(0.5*h) + exp(-1*h*((2 + 1)/2*((AMPK + SIRT1)/(1 + AMPK + SIRT1))*(1 - (1 + 1)/1*(GSK3B/(1 + GSK3B))) - 0.5)))/((1 - exp(0.5*h))*(1 + exp(-1*h*((2 + 1)/2*((AMPK + SIRT1)/(1 + AMPK + SIRT1))*(1 - (1 + 1)/1*(GSK3B/(1 + GSK3B))) - 0.5)))) - gamma*NRF2;
  P38' = (-exp(0.5*h) + exp(-1*h*((3 + 1)/3*((FAK_E + MKK3_6 + ROS)/(1 + FAK_E + MKK3_6 + ROS)) - 0.5)))/((1 - exp(0.5*h))*(1 + exp(-1*h*((3 + 1)/3*((FAK_E + MKK3_6 + ROS)/(1 + FAK_E + MKK3_6 + ROS)) - 0.5)))) - gamma*P38;
  PAK1' = (-exp(0.5*h) + exp(-1*h*((3 + 1)/3*((CDC42 + RAC1_M + RAC1_E)/(1 + CDC42 + RAC1_M + RAC1_E)) - 0.5)))/((1 - exp(0.5*h))*(1 + exp(-1*h*((3 + 1)/3*((CDC42 + RAC1_M + RAC1_E)/(1 + CDC42 + RAC1_M + RAC1_E)) - 0.5)))) - gamma*PAK1;
  PDK1_E' = (-exp(0.5*h) + exp(-1*h*((1 + 1)/1*(PIP3_E/(1 + PIP3_E)) - 0.5)))/((1 - exp(0.5*h))*(1 + exp(-1*h*((1 + 1)/1*(PIP3_E/(1 + PIP3_E)) - 0.5)))) - gamma*PDK1_E;
  PDK1_M' = (-exp(0.5*h) + exp(-1*h*((1 + 1)/1*(PIP3_M/(1 + PIP3_M)) - 0.5)))/((1 - exp(0.5*h))*(1 + exp(-1*h*((1 + 1)/1*(PIP3_M/(1 + PIP3_M)) - 0.5)))) - gamma*PDK1_M;
  PGE2' = (-exp(0.5*h) + exp(-1*h*((2 + 1)/2*((COX_2 + PLA2)/(1 + COX_2 + PLA2)) - 0.5)))/((1 - exp(0.5*h))*(1 + exp(-1*h*((2 + 1)/2*((COX_2 + PLA2)/(1 + COX_2 + PLA2)) - 0.5)))) - gamma*PGE2;
  PHD2' = (-exp(0.5*h) + exp(-1*h*((1 + 1)/1*(HIF_1alpha/(1 + HIF_1alpha)) - 0.5)))/((1 - exp(0.5*h))*(1 + exp(-1*h*((1 + 1)/1*(HIF_1alpha/(1 + HIF_1alpha)) - 0.5)))) - gamma*PHD2;
  PI3K_E' = (-exp(0.5*h) + exp(-1*h*((1 + 1)/1*(FAK_E/(1 + FAK_E)) - 0.5)))/((1 - exp(0.5*h))*(1 + exp(-1*h*((1 + 1)/1*(FAK_E/(1 + FAK_E)) - 0.5)))) - gamma*PI3K_E;
  PI3K_M' = (-exp(0.5*h) + exp(-1*h*((1 + 1)/1*(FAK_M/(1 + FAK_M)) - 0.5)))/((1 - exp(0.5*h))*(1 + exp(-1*h*((1 + 1)/1*(FAK_M/(1 + FAK_M)) - 0.5)))) - gamma*PI3K_M;
  PIEZO1' = (-exp(0.5*h) + exp(-1*h*((1 + 1)/1*(HL/(1 + HL))*(1 - (1 + 1)/1*(Hypo/(1 + Hypo))) - 0.5)))/((1 - exp(0.5*h))*(1 + exp(-1*h*((1 + 1)/1*(HL/(1 + HL))*(1 - (1 + 1)/1*(Hypo/(1 + Hypo))) - 0.5)))) - gamma*PIEZO1;
  PIP3_E' = (-exp(0.5*h) + exp(-1*h*((1 + 1)/1*(PI3K_E/(1 + PI3K_E))*(1 - (1 + 1)/1*(PTEN/(1 + PTEN))) - 0.5)))/((1 - exp(0.5*h))*(1 + exp(-1*h*((1 + 1)/1*(PI3K_E/(1 + PI3K_E))*(1 - (1 + 1)/1*(PTEN/(1 + PTEN))) - 0.5)))) - gamma*PIP3_E;
  PIP3_M' = (-exp(0.5*h) + exp(-1*h*((1 + 1)/1*(PI3K_M/(1 + PI3K_M)) - 0.5)))/((1 - exp(0.5*h))*(1 + exp(-1*h*((1 + 1)/1*(PI3K_M/(1 + PI3K_M)) - 0.5)))) - gamma*PIP3_M;
  PKC_M' = (-exp(0.5*h) + exp(-1*h*((2 + 1)/2*((Ca2plusos + SDC4_M)/(1 + Ca2plusos + SDC4_M)) - 0.5)))/((1 - exp(0.5*h))*(1 + exp(-1*h*((2 + 1)/2*((Ca2plusos + SDC4_M)/(1 + Ca2plusos + SDC4_M)) - 0.5)))) - gamma*PKC_M;
  PKC_E' = (-exp(0.5*h) + exp(-1*h*((2 + 1)/2*((Ca2plussu + SDC4_E)/(1 + Ca2plussu + SDC4_E)) - 0.5)))/((1 - exp(0.5*h))*(1 + exp(-1*h*((2 + 1)/2*((Ca2plussu + SDC4_E)/(1 + Ca2plussu + SDC4_E)) - 0.5)))) - gamma*PKC_E;
  PKN1' = (-exp(0.5*h) + exp(-1*h*((1 + 1)/1*(RhoA_E/(1 + RhoA_E)) - 0.5)))/((1 - exp(0.5*h))*(1 + exp(-1*h*((1 + 1)/1*(RhoA_E/(1 + RhoA_E)) - 0.5)))) - gamma*PKN1;
  PLA2' = (-exp(0.5*h) + exp(-1*h*((4 + 1)/4*((Ca2plussu + ERK_E + ERK_M + P38)/(1 + Ca2plussu + ERK_E + ERK_M + P38)) - 0.5)))/((1 - exp(0.5*h))*(1 + exp(-1*h*((4 + 1)/4*((Ca2plussu + ERK_E + ERK_M + P38)/(1 + Ca2plussu + ERK_E + ERK_M + P38)) - 0.5)))) - gamma*PLA2;
  PLCgamma_M' = (-exp(0.5*h) + exp(-1*h*((1 + 1)/1*(PIP3_M/(1 + PIP3_M)) - 0.5)))/((1 - exp(0.5*h))*(1 + exp(-1*h*((1 + 1)/1*(PIP3_M/(1 + PIP3_M)) - 0.5)))) - gamma*PLCgamma_M;
  PLCgamma_E' = (-exp(0.5*h) + exp(-1*h*((1 + 1)/1*(PIP3_E/(1 + PIP3_E)) - 0.5)))/((1 - exp(0.5*h))*(1 + exp(-1*h*((1 + 1)/1*(PIP3_E/(1 + PIP3_E)) - 0.5)))) - gamma*PLCgamma_E;
  PLD2' = (-exp(0.5*h) + exp(-1*h*((4 + 1)/4*((PKC_M + PKC_E + RAC1_M + RAC1_E)/(1 + PKC_M + PKC_E + RAC1_M + RAC1_E))*(1 - (1 + 1)/1*(PPARgamma/(1 + PPARgamma))) - 0.5)))/((1 - exp(0.5*h))*(1 + exp(-1*h*((4 + 1)/4*((PKC_M + PKC_E + RAC1_M + RAC1_E)/(1 + PKC_M + PKC_E + RAC1_M + RAC1_E))*(1 - (1 + 1)/1*(PPARgamma/(1 + PPARgamma))) - 0.5)))) - gamma*PLD2;
  PPARgamma' = (-exp(0.5*h) + exp(-1*h*((3 + 1)/3*((AKT1_M + AMPK + NRF2)/(1 + AKT1_M + AMPK + NRF2))*(1 - (2 + 1)/2*((AP_1 + NF_kappaB)/(1 + AP_1 + NF_kappaB))) - 0.5)))/((1 - exp(0.5*h))*(1 + exp(-1*h*((3 + 1)/3*((AKT1_M + AMPK + NRF2)/(1 + AKT1_M + AMPK + NRF2))*(1 - (2 + 1)/2*((AP_1 + NF_kappaB)/(1 + AP_1 + NF_kappaB))) - 0.5)))) - gamma*PPARgamma;
  PTEN' = (-exp(0.5*h) + exp(-1*h*((3 + 1)/3*((FOXO + PPARgamma + SIRT1)/(1 + FOXO + PPARgamma + SIRT1)) - 0.5)))/((1 - exp(0.5*h))*(1 + exp(-1*h*((3 + 1)/3*((FOXO + PPARgamma + SIRT1)/(1 + FOXO + PPARgamma + SIRT1)) - 0.5)))) - gamma*PTEN;
  RAC1_M' = (-exp(0.5*h) + exp(-1*h*((1 + 1)/1*(FAK_M/(1 + FAK_M))*(1 - (1 + 1)/1*(RhoA_E/(1 + RhoA_E))) - 0.5)))/((1 - exp(0.5*h))*(1 + exp(-1*h*((1 + 1)/1*(FAK_M/(1 + FAK_M))*(1 - (1 + 1)/1*(RhoA_E/(1 + RhoA_E))) - 0.5)))) - gamma*RAC1_M;
  RAC1_E' = (-exp(0.5*h) + exp(-1*h*((1 + 1)/1*(FAK_E/(1 + FAK_E))*(1 - (1 + 1)/1*(RhoA_M/(1 + RhoA_M))) - 0.5)))/((1 - exp(0.5*h))*(1 + exp(-1*h*((1 + 1)/1*(FAK_E/(1 + FAK_E))*(1 - (1 + 1)/1*(RhoA_M/(1 + RhoA_M))) - 0.5)))) - gamma*RAC1_E;
  RAF_E' = (-exp(0.5*h) + exp(-1*h*((1 + 1)/1*(RAS_E/(1 + RAS_E)) - 0.5)))/((1 - exp(0.5*h))*(1 + exp(-1*h*((1 + 1)/1*(RAS_E/(1 + RAS_E)) - 0.5)))) - gamma*RAF_E;
  RAF_M' = (-exp(0.5*h) + exp(-1*h*((1 + 1)/1*(RAS_M/(1 + RAS_M)) - 0.5)))/((1 - exp(0.5*h))*(1 + exp(-1*h*((1 + 1)/1*(RAS_M/(1 + RAS_M)) - 0.5)))) - gamma*RAF_M;
  RAS_E' = (-exp(0.5*h) + exp(-1*h*((1 + 1)/1*(FAK_E/(1 + FAK_E)) - 0.5)))/((1 - exp(0.5*h))*(1 + exp(-1*h*((1 + 1)/1*(FAK_E/(1 + FAK_E)) - 0.5)))) - gamma*RAS_E;
  RAS_M' = (-exp(0.5*h) + exp(-1*h*((1 + 1)/1*(FAK_M/(1 + FAK_M)) - 0.5)))/((1 - exp(0.5*h))*(1 + exp(-1*h*((1 + 1)/1*(FAK_M/(1 + FAK_M)) - 0.5)))) - gamma*RAS_M;
  Rheb' = (-exp(0.5*h) + exp(-1*h*((3 + 1)/3*((AKT1_E + AKT1_M + ERK_M)/(1 + AKT1_E + AKT1_M + ERK_M))*(1 - (2 + 1)/2*((AMPK + GSK3B)/(1 + AMPK + GSK3B))) - 0.5)))/((1 - exp(0.5*h))*(1 + exp(-1*h*((3 + 1)/3*((AKT1_E + AKT1_M + ERK_M)/(1 + AKT1_E + AKT1_M + ERK_M))*(1 - (2 + 1)/2*((AMPK + GSK3B)/(1 + AMPK + GSK3B))) - 0.5)))) - gamma*Rheb;
  RhoA_E' = (-exp(0.5*h) + exp(-1*h*((1 + 1)/1*(FAK_E/(1 + FAK_E)) - 0.5)))/((1 - exp(0.5*h))*(1 + exp(-1*h*((1 + 1)/1*(FAK_E/(1 + FAK_E)) - 0.5)))) - gamma*RhoA_E;
  RhoA_M' = (-exp(0.5*h) + exp(-1*h*((1 + 1)/1*(FAK_M/(1 + FAK_M)) - 0.5)))/((1 - exp(0.5*h))*(1 + exp(-1*h*((1 + 1)/1*(FAK_M/(1 + FAK_M)) - 0.5)))) - gamma*RhoA_M;
  ROCK_E' = (-exp(0.5*h) + exp(-1*h*((1 + 1)/1*(RhoA_E/(1 + RhoA_E)) - 0.5)))/((1 - exp(0.5*h))*(1 + exp(-1*h*((1 + 1)/1*(RhoA_E/(1 + RhoA_E)) - 0.5)))) - gamma*ROCK_E;
  ROCK_M' = (-exp(0.5*h) + exp(-1*h*((1 + 1)/1*(RhoA_M/(1 + RhoA_M)) - 0.5)))/((1 - exp(0.5*h))*(1 + exp(-1*h*((1 + 1)/1*(RhoA_M/(1 + RhoA_M)) - 0.5)))) - gamma*ROCK_M;
  ROS' = (-exp(0.5*h) + exp(-1*h*((4 + 1)/4*((Ca2plussu + DRP1 + ROCK_E + NutD)/(1 + Ca2plussu + DRP1 + ROCK_E + NutD))*(1 - (1 + 1)/1*(SOD1/(1 + SOD1))) - 0.5)))/((1 - exp(0.5*h))*(1 + exp(-1*h*((4 + 1)/4*((Ca2plussu + DRP1 + ROCK_E + NutD)/(1 + Ca2plussu + DRP1 + ROCK_E + NutD))*(1 - (1 + 1)/1*(SOD1/(1 + SOD1))) - 0.5)))) - gamma*ROS;
  RSK' = (-exp(0.5*h) + exp(-1*h*((1 + 1)/1*(ERK_M/(1 + ERK_M)) - 0.5)))/((1 - exp(0.5*h))*(1 + exp(-1*h*((1 + 1)/1*(ERK_M/(1 + ERK_M)) - 0.5)))) - gamma*RSK;
  RUNX2' = (-exp(0.5*h) + exp(-1*h*((3 + 1)/3*((ERK_E + ERK_M + P38)/(1 + ERK_E + ERK_M + P38))*(1 - (1 + 1)/1*(SOX9/(1 + SOX9))) - 0.5)))/((1 - exp(0.5*h))*(1 + exp(-1*h*((3 + 1)/3*((ERK_E + ERK_M + P38)/(1 + ERK_E + ERK_M + P38))*(1 - (1 + 1)/1*(SOX9/(1 + SOX9))) - 0.5)))) - gamma*RUNX2;
  SIRT1' = (-exp(0.5*h) + exp(-1*h*((1 + 1)/1*(NADplus/(1 + NADplus)) - 0.5)))/((1 - exp(0.5*h))*(1 + exp(-1*h*((1 + 1)/1*(NADplus/(1 + NADplus)) - 0.5)))) - gamma*SIRT1;
  SMIT1' = (-exp(0.5*h) + exp(-1*h*((1 + 1)/1*(TonEBP/(1 + TonEBP)) - 0.5)))/((1 - exp(0.5*h))*(1 + exp(-1*h*((1 + 1)/1*(TonEBP/(1 + TonEBP)) - 0.5)))) - gamma*SMIT1;
  SOD1' = (-exp(0.5*h) + exp(-1*h*((1 + 1)/1*(NRF2/(1 + NRF2)) - 0.5)))/((1 - exp(0.5*h))*(1 + exp(-1*h*((1 + 1)/1*(NRF2/(1 + NRF2)) - 0.5)))) - gamma*SOD1;
  SOD2' = (-exp(0.5*h) + exp(-1*h*((2 + 1)/2*((FOXO + NRF2)/(1 + FOXO + NRF2)) - 0.5)))/((1 - exp(0.5*h))*(1 + exp(-1*h*((2 + 1)/2*((FOXO + NRF2)/(1 + FOXO + NRF2)) - 0.5)))) - gamma*SOD2;
  SOX5' = (-exp(0.5*h) + exp(-1*h*((1 + 1)/1*(SOX9/(1 + SOX9)) - 0.5)))/((1 - exp(0.5*h))*(1 + exp(-1*h*((1 + 1)/1*(SOX9/(1 + SOX9)) - 0.5)))) - gamma*SOX5;
  SOX6' = (-exp(0.5*h) + exp(-1*h*((1 + 1)/1*(SOX9/(1 + SOX9)) - 0.5)))/((1 - exp(0.5*h))*(1 + exp(-1*h*((1 + 1)/1*(SOX9/(1 + SOX9)) - 0.5)))) - gamma*SOX6;
  SOX9' = (-exp(0.5*h) + exp(-1*h*((4 + 1)/4*((AKT1_M + CREB + HIF_1alpha + ROCK_M)/(1 + AKT1_M + CREB + HIF_1alpha + ROCK_M))*(1 - (4 + 1)/4*((JNK + NF_kappaB + NFAT + P38)/(1 + JNK + NF_kappaB + NFAT + P38))) - 0.5)))/((1 - exp(0.5*h))*(1 + exp(-1*h*((4 + 1)/4*((AKT1_M + CREB + HIF_1alpha + ROCK_M)/(1 + AKT1_M + CREB + HIF_1alpha + ROCK_M))*(1 - (4 + 1)/4*((JNK + NF_kappaB + NFAT + P38)/(1 + JNK + NF_kappaB + NFAT + P38))) - 0.5)))) - gamma*SOX9;
  TAK1' = (-exp(0.5*h) + exp(-1*h*((2 + 1)/2*((Ca2plussu + ROS)/(1 + Ca2plussu + ROS)) - 0.5)))/((1 - exp(0.5*h))*(1 + exp(-1*h*((2 + 1)/2*((Ca2plussu + ROS)/(1 + Ca2plussu + ROS)) - 0.5)))) - gamma*TAK1;
  TAUT' = (-exp(0.5*h) + exp(-1*h*((1 + 1)/1*(TonEBP/(1 + TonEBP)) - 0.5)))/((1 - exp(0.5*h))*(1 + exp(-1*h*((1 + 1)/1*(TonEBP/(1 + TonEBP)) - 0.5)))) - gamma*TAUT;
  TGFbeta' = (-exp(0.5*h) + exp(-1*h*((3 + 1)/3*((ROCK_E + ROCK_M + alphaVbeta3)/(1 + ROCK_E + ROCK_M + alphaVbeta3)) - 0.5)))/((1 - exp(0.5*h))*(1 + exp(-1*h*((3 + 1)/3*((ROCK_E + ROCK_M + alphaVbeta3)/(1 + ROCK_E + ROCK_M + alphaVbeta3)) - 0.5)))) - gamma*TGFbeta;
  TIMP3' = (-exp(0.5*h) + exp(-1*h*((3 + 1)/3*((FOXO + PPARgamma + SOX9)/(1 + FOXO + PPARgamma + SOX9))*(1 - (1 + 1)/1*(AP_1/(1 + AP_1))) - 0.5)))/((1 - exp(0.5*h))*(1 + exp(-1*h*((3 + 1)/3*((FOXO + PPARgamma + SOX9)/(1 + FOXO + PPARgamma + SOX9))*(1 - (1 + 1)/1*(AP_1/(1 + AP_1))) - 0.5)))) - gamma*TIMP3;
  TNF' = (-exp(0.5*h) + exp(-1*h*((3 + 1)/3*((AP_1 + NF_kappaB + NFAT)/(1 + AP_1 + NF_kappaB + NFAT)) - 0.5)))/((1 - exp(0.5*h))*(1 + exp(-1*h*((3 + 1)/3*((AP_1 + NF_kappaB + NFAT)/(1 + AP_1 + NF_kappaB + NFAT)) - 0.5)))) - gamma*TNF;
  TonEBP' = (-exp(0.5*h) + exp(-1*h*((3 + 1)/3*((ERK_E + ERK_M + P38)/(1 + ERK_E + ERK_M + P38))*(1 - (1 + 1)/1*(GSK3B/(1 + GSK3B))) - 0.5)))/((1 - exp(0.5*h))*(1 + exp(-1*h*((3 + 1)/3*((ERK_E + ERK_M + P38)/(1 + ERK_E + ERK_M + P38))*(1 - (1 + 1)/1*(GSK3B/(1 + GSK3B))) - 0.5)))) - gamma*TonEBP;
  TRPV4' = (-exp(0.5*h) + exp(-1*h*((1 + 1)/1*(NL/(1 + NL)) - 0.5)))/((1 - exp(0.5*h))*(1 + exp(-1*h*((1 + 1)/1*(NL/(1 + NL)) - 0.5)))) - gamma*TRPV4;
  ULK1' = (-exp(0.5*h) + exp(-1*h*((1 + 1)/1*(AMPK/(1 + AMPK))*(1 - (1 + 1)/1*(mTORC1/(1 + mTORC1))) - 0.5)))/((1 - exp(0.5*h))*(1 + exp(-1*h*((1 + 1)/1*(AMPK/(1 + AMPK))*(1 - (1 + 1)/1*(mTORC1/(1 + mTORC1))) - 0.5)))) - gamma*ULK1;
  VEGF' = (-exp(0.5*h) + exp(-1*h*((3 + 1)/3*((HIF_1alpha + HIF_2alpha + NF_kappaB)/(1 + HIF_1alpha + HIF_2alpha + NF_kappaB)) - 0.5)))/((1 - exp(0.5*h))*(1 + exp(-1*h*((3 + 1)/3*((HIF_1alpha + HIF_2alpha + NF_kappaB)/(1 + HIF_1alpha + HIF_2alpha + NF_kappaB)) - 0.5)))) - gamma*VEGF;
  VHL' = (-exp(0.5*h) + exp(-1*h*((1 + 1)/1*(PHD2/(1 + PHD2))*(1 - (1 + 1)/1*(ROS/(1 + ROS))) - 0.5)))/((1 - exp(0.5*h))*(1 + exp(-1*h*((1 + 1)/1*(PHD2/(1 + PHD2))*(1 - (1 + 1)/1*(ROS/(1 + ROS))) - 0.5)))) - gamma*VHL;
  Wnt3a' = (-exp(0.5*h) + exp(-1*h*((3 + 1)/3*((NF_kappaB + YAP_TAZ + beta_catenin)/(1 + NF_kappaB + YAP_TAZ + beta_catenin))*(1 - (1 + 1)/1*(SOX9/(1 + SOX9))) - 0.5)))/((1 - exp(0.5*h))*(1 + exp(-1*h*((3 + 1)/3*((NF_kappaB + YAP_TAZ + beta_catenin)/(1 + NF_kappaB + YAP_TAZ + beta_catenin))*(1 - (1 + 1)/1*(SOX9/(1 + SOX9))) - 0.5)))) - gamma*Wnt3a;
  Wnt5a' = (-exp(0.5*h) + exp(-1*h*((2 + 1)/2*((NF_kappaB + YAP_TAZ)/(1 + NF_kappaB + YAP_TAZ))*(1 - (1 + 1)/1*(FOXO/(1 + FOXO))) - 0.5)))/((1 - exp(0.5*h))*(1 + exp(-1*h*((2 + 1)/2*((NF_kappaB + YAP_TAZ)/(1 + NF_kappaB + YAP_TAZ))*(1 - (1 + 1)/1*(FOXO/(1 + FOXO))) - 0.5)))) - gamma*Wnt5a;
  YAP_TAZ' = (-exp(0.5*h) + exp(-1*h*((2 + 1)/2*((ROCK_E + ROCK_M)/(1 + ROCK_E + ROCK_M))*(1 - (1 + 1)/1*(LATS1_2/(1 + LATS1_2))) - 0.5)))/((1 - exp(0.5*h))*(1 + exp(-1*h*((2 + 1)/2*((ROCK_E + ROCK_M)/(1 + ROCK_E + ROCK_M))*(1 - (1 + 1)/1*(LATS1_2/(1 + LATS1_2))) - 0.5)))) - gamma*YAP_TAZ;
  alpha5beta1_FN' = (-exp(0.5*h) + exp(-1*h*((1 + 1)/1*(NL/(1 + NL))*(1 - (1 + 1)/1*(Hypo/(1 + Hypo))) - 0.5)))/((1 - exp(0.5*h))*(1 + exp(-1*h*((1 + 1)/1*(NL/(1 + NL))*(1 - (1 + 1)/1*(Hypo/(1 + Hypo))) - 0.5)))) - gamma*alpha5beta1_FN;
  alpha5beta1_Fs' = (-exp(0.5*h) + exp(-1*h*((1 + 1)/1*(HL/(1 + HL))*(1 - (1 + 1)/1*(Hypo/(1 + Hypo))) - 0.5)))/((1 - exp(0.5*h))*(1 + exp(-1*h*((1 + 1)/1*(HL/(1 + HL))*(1 - (1 + 1)/1*(Hypo/(1 + Hypo))) - 0.5)))) - gamma*alpha5beta1_Fs;
  alphaVbeta3' = (-exp(0.5*h) + exp(-1*h*((1 + 1)/1*(HL/(1 + HL))*(1 - (1 + 1)/1*(Hypo/(1 + Hypo))) - 0.5)))/((1 - exp(0.5*h))*(1 + exp(-1*h*((1 + 1)/1*(HL/(1 + HL))*(1 - (1 + 1)/1*(Hypo/(1 + Hypo))) - 0.5)))) - gamma*alphaVbeta3;
  alphaVbeta6' = (-exp(0.5*h) + exp(-1*h*((1 + 1)/1*(NL/(1 + NL))*(1 - (1 + 1)/1*(Hypo/(1 + Hypo))) - 0.5)))/((1 - exp(0.5*h))*(1 + exp(-1*h*((1 + 1)/1*(NL/(1 + NL))*(1 - (1 + 1)/1*(Hypo/(1 + Hypo))) - 0.5)))) - gamma*alphaVbeta6;
  beta_catenin' = (-exp(0.5*h) + exp(-1*h*((3 + 1)/3*((RAC1_M + RAC1_E + YAP_TAZ)/(1 + RAC1_M + RAC1_E + YAP_TAZ))*(1 - (2 + 1)/2*((GSK3B + SOX9)/(1 + GSK3B + SOX9))) - 0.5)))/((1 - exp(0.5*h))*(1 + exp(-1*h*((3 + 1)/3*((RAC1_M + RAC1_E + YAP_TAZ)/(1 + RAC1_M + RAC1_E + YAP_TAZ))*(1 - (2 + 1)/2*((GSK3B + SOX9)/(1 + GSK3B + SOX9))) - 0.5)))) - gamma*beta_catenin;
  NADplus' = (-exp(0.5*h) + exp(-1*h*((1 + 1)/1*(AMPK/(1 + AMPK))*(1 - (1 + 1)/1*(ROS/(1 + ROS))) - 0.5)))/((1 - exp(0.5*h))*(1 + exp(-1*h*((1 + 1)/1*(AMPK/(1 + AMPK))*(1 - (1 + 1)/1*(ROS/(1 + ROS))) - 0.5)))) - gamma*NADplus;
  LKB1' = (-exp(0.5*h) + exp(-1*h*((1 + 1)/1*(SIRT1/(1 + SIRT1)) - 0.5)))/((1 - exp(0.5*h))*(1 + exp(-1*h*((1 + 1)/1*(SIRT1/(1 + SIRT1)) - 0.5)))) - gamma*LKB1;
  SDC4_M' = (-exp(0.5*h) + exp(-1*h*((1 + 1)/1*(NL/(1 + NL))*(1 - (1 + 1)/1*(Hypo/(1 + Hypo))) - 0.5)))/((1 - exp(0.5*h))*(1 + exp(-1*h*((1 + 1)/1*(NL/(1 + NL))*(1 - (1 + 1)/1*(Hypo/(1 + Hypo))) - 0.5)))) - gamma*SDC4_M;
  SDC4_E' = (-exp(0.5*h) + exp(-1*h*((1 + 1)/1*(HL/(1 + HL))*(1 - (1 + 1)/1*(Hypo/(1 + Hypo))) - 0.5)))/((1 - exp(0.5*h))*(1 + exp(-1*h*((1 + 1)/1*(HL/(1 + HL))*(1 - (1 + 1)/1*(Hypo/(1 + Hypo))) - 0.5)))) - gamma*SDC4_E;
  NutD' = (-exp(0.5*h) + exp(-1*h*((1 + 1)/1*(Hypo/(1 + Hypo)) - 0.5)))/((1 - exp(0.5*h))*(1 + exp(-1*h*((1 + 1)/1*(Hypo/(1 + Hypo)) - 0.5)))) - gamma*NutD;
  MitD' = (-exp(0.5*h) + exp(-1*h*((2 + 1)/2*((ROS + NutD)/(1 + ROS + NutD)) - 0.5)))/((1 - exp(0.5*h))*(1 + exp(-1*h*((2 + 1)/2*((ROS + NutD)/(1 + ROS + NutD)) - 0.5)))) - gamma*MitD;

  // Unit definitions:
  unit time_unit = second;
  unit arbitrary_units = dimensionless;
end
